<?xml version="1.0" encoding="utf-8"?>

<autopilot name="EPPFPV Autopilot">

  <!-- INTERFACE PROPERTIES -->

  <property>ap/airspeed-setpoint</property>
  <property> ap/autopilot-airspeed-on </property>

<!--
=====================================================
AIRSPEED HOLD CHANNEL
=====================================================
-->

<channel name="Airspeed hold">

  <switch name="ap/airspeed-control-autopilot-on">
    <default value="0"/>
    <test value="1">
      ap/autopilot-airspeed-on ne 0
    </test>
  </switch>

  <summer name="ap/airspeed-error">
    <description> Calculates the error in airspeed </description>
    <input> ap/airspeed-setpoint </input>
    <input> -velocities/vc-fps </input>
  </summer>

  <pid name="ap/airspeed-pid-control">
    <input> ap/airspeed-error </input>
    <kp> 0.01 </kp>
    <ki> 0.001 </ki>
    <kd> 0.0 </kd>
    <clipto>
      <min> -1.0 </min>
      <max> 1.0 </max>
    </clipto>
  </pid>

    <summer name="ap/throttle-control-norm">
      <input> fcs/throttle-pos-norm </input>
      <input>ap/airspeed-pid-control</input>
      <clipto>
        <min> 0.0 </min>
        <max> 1.0 </max>
      </clipto>
    </summer>

  <switch name="fcs/throttle-cmd-norm">
    <default value="fcs/throttle-cmd-norm"/>
    <test value="ap/throttle-control-norm">
      ap/airspeed-control-autopilot-on eq 1
    </test>
    <output> fcs/throttle-cmd-norm </output>
  </switch>


</channel>

</autopilot>
