<?xml version="1.0"?>

<propeller name="Fixed-Pitch 16-inch Two-Blade Propeller">
  <ixx> 0.001 </ixx>
  <diameter unit="IN"> 16.0 </diameter>
  <numblades> 2 </numblades>
  <gearratio>  0.62 </gearratio>
  <p_factor>   1.26 </p_factor>

  <table name="C_THRUST" type="internal">
    <tableData>
      0.0   0.0156
      0.1   0.0149
      0.2   0.0143
      0.3   0.0132
      0.4   0.0118
      0.5   0.0104
      0.6   0.0084
      0.7   0.0064
      0.8   0.0035
      1.0  -0.0012
      1.2  -0.0061
      1.4  -0.0110
    </tableData>
  </table>

  <table name="C_POWER" type="internal">
    <tableData>
      0.0   0.0105
      0.1   0.0105
      0.2   0.0102
      0.3   0.0100
      0.4   0.0094
      0.5   0.0086
      0.6   0.0079
      0.7   0.0066
      0.8   0.0054
      1.0   0.0019
      1.2  -0.0031
      1.4  -0.0093
      1.6  -0.0158
    </tableData>
  </table>

  <table name="CT_MACH" type="internal">
    <tableData>
      0.85   1.0
      1.05   0.8
    </tableData>2.4
  </table>

  <table name="CP_MACH" type="internal">
    <tableData>
      0.85   1.0
      1.05   1.8
      2.00   1.4
    </tableData>
  </table>

</propeller>
